<neuroml xmlns="http://www.neuroml.org/schema/neuroml2"  xmlns:xs="http://www.w3.org/2001/XMLSchema" xmlns:xsi="http://www.w3.org/2001/XMLSchema-instance" xsi:schemaLocation="http://www.neuroml.org/schema/neuroml2 https://raw.github.com/NeuroML/NeuroML2/development/Schemas/NeuroML2/NeuroML_v2beta5.xsd" id="network_477127614_HH2">
    <include href="HH2_477127614.cell.nml"></include>
    <pulseGenerator id="input_22" delay="270ms" duration="1000ms" amplitude="-90.0 pA"/>
    <pulseGenerator id="input_27" delay="270ms" duration="1000ms" amplitude="10.0 pA"/>
    <pulseGenerator id="input_38" delay="270ms" duration="1000ms" amplitude="40.0 pA"/>
    <pulseGenerator id="input_41" delay="270ms" duration="1000ms" amplitude="60.000004 pA"/>
    <pulseGenerator id="input_29" delay="270ms" duration="1000ms" amplitude="50.0 pA"/>
    <pulseGenerator id="input_30" delay="270ms" duration="1000ms" amplitude="70.0 pA"/>
    <pulseGenerator id="input_35" delay="270ms" duration="1000ms" amplitude="170.0 pA"/>
    <network id="network_477127614_HH2" type="networkWithTemperature" temperature="34 degC">
        <population id="Pop0" component="HH2_477127614" size="7" type="populationList">
            <instance id="0">
                <location x="0." y="0." z="0."/>
            </instance>
            <instance id="1">
                <location x="100." y="0." z="0."/>
            </instance>
            <instance id="2">
                <location x="200." y="0." z="0."/>
            </instance>
            <instance id="3">
                <location x="300." y="0." z="0."/>
            </instance>
            <instance id="4">
                <location x="400." y="0." z="0."/>
            </instance>
            <instance id="5">
                <location x="500." y="0." z="0."/>
            </instance>
            <instance id="6">
                <location x="600." y="0." z="0."/>
            </instance>
        </population>
        <inputList id="input_22" population="Pop0" component="input_22">
            <input id="0" target="../Pop0/0/HH2_477127614" destination="synapses"/>
        </inputList>
        <inputList id="input_27" population="Pop0" component="input_27">
            <input id="0" target="../Pop0/1/HH2_477127614" destination="synapses"/>
        </inputList>
        <inputList id="input_38" population="Pop0" component="input_38">
            <input id="0" target="../Pop0/2/HH2_477127614" destination="synapses"/>
        </inputList>
        <inputList id="input_41" population="Pop0" component="input_41">
            <input id="0" target="../Pop0/3/HH2_477127614" destination="synapses"/>
        </inputList>
        <inputList id="input_29" population="Pop0" component="input_29">
            <input id="0" target="../Pop0/4/HH2_477127614" destination="synapses"/>
        </inputList>
        <inputList id="input_30" population="Pop0" component="input_30">
            <input id="0" target="../Pop0/5/HH2_477127614" destination="synapses"/>
        </inputList>
        <inputList id="input_35" population="Pop0" component="input_35">
            <input id="0" target="../Pop0/6/HH2_477127614" destination="synapses"/>
        </inputList>
    </network>
</neuroml>
