<?xml version="1.0" encoding="UTF-8"?>
<neuroml xmlns="http://www.neuroml.org/schema/neuroml2"
    xmlns:xsi="http://www.w3.org/2001/XMLSchema-instance"
    xsi:schemaLocation="http://www.neuroml.org/schema/neuroml2 https://raw.github.com/NeuroML/NeuroML2/development/Schemas/NeuroML2/NeuroML_v2beta4.xsd"
    id = "L23_Retuned">

  <notes> NeuroML 2 file generated from ModelView by: NEURON -- Release 7.4 (1351:8f462ea7e030) 2015-07-21
          Authors: Michael Hines, Sushil Kambampati and Padraig Gleeson,
          Yale University and UCL
  </notes>

    <include href="ca.channel.nml"/>
    <include href="it.channel.nml"/>
    <include href="kca.channel.nml"/>
    <include href="km.channel.nml"/>
    <include href="kv.channel.nml"/>
    <include href="na.channel.nml"/>
    <include href="pas.channel.nml"/>

  <cell id="L23_Retuned">
    <notes>Cell: Cell0 exported from NEURON ModelView</notes>
    <morphology id="morphology">
<!-- Section: soma (segmentGroup: soma) which has 2 3D points, so 1 segment(s)-->
      <segment id="0" name = "Seg0_soma">
        <proximal x="0" y="0" z="0" diameter="29.7838"/>
        <distal x="0" y="0" z="9.26604" diameter="29.7838"/>
      </segment>
<!-- Section: axon (segmentGroup: axon) which has 9 3D points, so 8 segment(s)-->
      <segment id="2946" name = "Seg0_axon">
        <parent segment="0"/>
        <proximal x="0" y="0" z="9.26604" diameter="1"/>
        <distal x="13.8159" y="-5.84128" z="9.26604" diameter="1"/>
      </segment>
      <segment id="2947" name = "Seg1_axon">
        <parent segment="2946"/>
        <distal x="41.4477" y="-17.5238" z="9.26604" diameter="1"/>
      </segment>
      <segment id="2948" name = "Seg2_axon">
        <parent segment="2947"/>
        <distal x="69.0796" y="-29.2064" z="9.26604" diameter="1"/>
      </segment>
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
<!-- Section: soma (segmentGroup: soma) which has 2 3D points, so 1 segment(s)-->

      <segmentGroup id = "soma"  neuroLexId="sao864921383">
         <notes>This group contains an unbranched set of segments, and all of the segmentGroups marked with
             neuroLexId = sao864921383 form a non-overlapping set of all of the segments.
             These segmentGroups correspond to the 'cables' of NeuroML v1.8.1, and map to/from NEURON sections.</notes>
        <!-- This is currently inside (old convention) & outside (new convention) the <annotation> element, as some APIs have trouble reading what's inside <annotation> (<xs:any..> in Schema) -->
        <property tag="numberInternalDivisions" value="7"/> <!-- Discretization of model at time of export from NEURON. Can be overridden by importing application -->
        <annotation>
          <property tag="numberInternalDivisions" value="7"/> <!-- Discretization of model at time of export from NEURON. Can be overridden by importing application -->
        </annotation>
        <member segment = "0"/>
      </segmentGroup>

<!-- Section: axon (segmentGroup: axon) which has 9 3D points, so 8 segment(s)-->

      <segmentGroup id = "axon"  neuroLexId="sao864921383">
         <notes>This group contains an unbranched set of segments, and all of the segmentGroups marked with
             neuroLexId = sao864921383 form a non-overlapping set of all of the segments.
             These segmentGroups correspond to the 'cables' of NeuroML v1.8.1, and map to/from NEURON sections.</notes>
        <!-- This is currently inside (old convention) & outside (new convention) the <annotation> element, as some APIs have trouble reading what's inside <annotation> (<xs:any..> in Schema) -->
        <property tag="numberInternalDivisions" value="7"/> <!-- Discretization of model at time of export from NEURON. Can be overridden by importing application -->
        <annotation>
          <property tag="numberInternalDivisions" value="7"/> <!-- Discretization of model at time of export from NEURON. Can be overridden by importing application -->
        </annotation>
        <member segment = "2946"/>
        <member segment = "2947"/>
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      </segmentGroup>

<!-- Section: dend4_1 (segmentGroup: dend4_1) which has 8 3D points, so 7 segment(s)-->

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
      <segmentGroup id="dendrite_group">
        <include segmentGroup = "dend4_1"/>
        <include segmentGroup = "dend3_1"/>
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      </segmentGroup>

      <segmentGroup id="soma_group"> <!-- Creating a group containing a single section: soma... -->
        <include segmentGroup = "soma"/>
      </segmentGroup>

      <segmentGroup id="axon_group"> <!-- Creating a group containing a single section: axon... -->
        <include segmentGroup = "axon"/>
      </segmentGroup>

    </morphology>

    <!-- Biophysical properties -->

        <biophysicalProperties id="biophys">
            <membraneProperties>
                <channelDensity id="pas_all" ionChannel="pas" condDensity="8e-05 S_per_cm2" erev="-74.8016780497 mV" ion="non_specific"/>
                <channelDensity id="kca_dends" ionChannel="kca" condDensity="3.0e-4 S_per_cm2" erev="-90 mV" segmentGroup="dendrite_group" ion="k"/>
                <channelDensity id="kca_soma" ionChannel="kca" condDensity="3.0e-4 S_per_cm2" erev="-90 mV" segmentGroup="soma_group" ion="k"/>
                <channelDensity id="km_dends" ionChannel="km" condDensity="1e-4 S_per_cm2" erev="-90 mV" segmentGroup="dendrite_group" ion="k"/>
                <channelDensity id="km_soma" ionChannel="km" condDensity="2.2e-4 S_per_cm2" erev="-90 mV" segmentGroup="soma_group" ion="k"/>
                <channelDensity id="kv_dends" ionChannel="kv" condDensity="0.0003 S_per_cm2" erev="-90 mV" segmentGroup="dendrite_group" ion="k"/>
                <channelDensity id="kv_soma" ionChannel="kv" condDensity="0.005 S_per_cm2" erev="-90 mV" segmentGroup="soma_group" ion="k"/>
                <channelDensity id="kv_axon" ionChannel="kv" condDensity="0.005 S_per_cm2" erev="-90 mV" segmentGroup="axon_group" ion="k"/>
                <channelDensity id="na_dends" ionChannel="na" condDensity="0.008 S_per_cm2" erev="60 mV" segmentGroup="dendrite_group" ion="na"/>
                <channelDensity id="na_soma" ionChannel="na" condDensity="0.05 S_per_cm2" erev="60 mV" segmentGroup="soma_group" ion="na"/>
                <channelDensity id="na_axon" ionChannel="na" condDensity="0.05 S_per_cm2" erev="60 mV" segmentGroup="axon_group" ion="na"/>
                <channelDensity id="it_dends" ionChannel="it" condDensity="0.00015 S_per_cm2" erev="140.67523 mV" segmentGroup="dendrite_group" ion="ca"/>
                <channelDensity id="it_soma" ionChannel="it" condDensity="0.0003 S_per_cm2" erev="140.67523 mV" segmentGroup="soma_group" ion="ca"/>
                <channelDensity id="ca_dends" ionChannel="ca" condDensity="5e-5 S_per_cm2" erev="140.67523 mV" segmentGroup="dendrite_group" ion="ca"/>
                <channelDensity id="ca_soma" ionChannel="ca" condDensity="5e-5 S_per_cm2" erev="140.67523 mV" segmentGroup="soma_group" ion="ca"/>
                <spikeThresh value="10mV"/>
                <specificCapacitance value="1.04928685549 uF_per_cm2"/>
                <initMembPotential value="-75.0 mV"/>
            </membraneProperties>
            <intracellularProperties>
                <resistivity value="0.1 kohm_cm"/>
            </intracellularProperties>
        </biophysicalProperties>

  </cell>

</neuroml>
