<neuroml xmlns="http://www.neuroml.org/schema/neuroml2"  xmlns:xs="http://www.w3.org/2001/XMLSchema" xmlns:xsi="http://www.w3.org/2001/XMLSchema-instance" xsi:schemaLocation="http://www.neuroml.org/schema/neuroml2 https://raw.github.com/NeuroML/NeuroML2/development/Schemas/NeuroML2/NeuroML_v2beta5.xsd" id="L23_Retuned_477127614">
    <include href="pas.channel.nml"></include>
    <include href="ca.channel.nml"></include>
    <include href="it.channel.nml"></include>
    <include href="kca.channel.nml"></include>
    <include href="km.channel.nml"></include>
    <include href="kv.channel.nml"></include>
    <include href="na.channel.nml"></include>
    <cell id="L23_Retuned_477127614">
        <notes>Cell model tuned to Allen Institute Cell Types Database, dataset: 477127614

Tuning procedure metadata:

{   'Prototype': 'SmithEtAl2013',
    'analysis_start_time': 0,
    'analysis_var': {   'baseline': 0,
                        'dvdt_threshold': 0,
                        'peak_delta': 0,
                        'peak_threshold': 0},
    'best_cand_analysis': {   'Pop0/0/RS/v:average_1000_1200': -98.5013988577827,
                              'Pop0/0/RS/v:average_last_1percent': -81.32808700000005,
                              'Pop0/0/RS/v:value_280': -89.1154,
                              'Pop0/1/RS/v:average_1000_1200': -79.46688257685604,
                              'Pop0/2/RS/v:average_1000_1200': -73.66641369907529,
                              'Pop0/3/RS/v:average_1000_1200': -69.14944691077235,
                              'Pop0/3/RS/v:max_peak_no': 0,
                              'Pop0/5/RS/v:mean_spike_frequency': 10.116906474820144,
                              'Pop0/6/RS/v:average_maximum': 59.530295111111123,
                              'Pop0/6/RS/v:average_minimum': -75.108279090909093,
                              'Pop0/6/RS/v:mean_spike_frequency': 44.840764331210195},
    'best_cand_analysis_full': {   'Pop0/0/RS/v:average_last_1percent': -81.32808700000005,
                                   'Pop0/0/RS/v:max_peak_no': 0,
                                   'Pop0/0/RS/v:maximum': -75.0,
                                   'Pop0/0/RS/v:min_peak_no': 0,
                                   'Pop0/0/RS/v:minimum': -98.5018,
                                   'Pop0/1/RS/v:average_last_1percent': -81.3647180666667,
                                   'Pop0/1/RS/v:max_peak_no': 0,
                                   'Pop0/1/RS/v:maximum': -75.0,
                                   'Pop0/1/RS/v:min_peak_no': 0,
                                   'Pop0/1/RS/v:minimum': -81.38715,
                                   'Pop0/2/RS/v:average_last_1percent': -81.38715166666653,
                                   'Pop0/2/RS/v:max_peak_no': 0,
                                   'Pop0/2/RS/v:maximum': -73.57818,
                                   'Pop0/2/RS/v:min_peak_no': 0,
                                   'Pop0/2/RS/v:minimum': -81.38964,
                                   'Pop0/3/RS/v:average_last_1percent': -81.40352213333338,
                                   'Pop0/3/RS/v:max_peak_no': 0,
                                   'Pop0/3/RS/v:maximum': -67.74269,
                                   'Pop0/3/RS/v:min_peak_no': 0,
                                   'Pop0/3/RS/v:minimum': -81.4072,
                                   'Pop0/4/RS/v:average_last_1percent': -81.39508699999998,
                                   'Pop0/4/RS/v:max_peak_no': 0,
                                   'Pop0/4/RS/v:maximum': -71.29542,
                                   'Pop0/4/RS/v:min_peak_no': 0,
                                   'Pop0/4/RS/v:minimum': -81.39815999999999,
                                   'Pop0/5/RS/v:average_last_1percent': -81.40503793333333,
                                   'Pop0/5/RS/v:average_maximum': 59.518556000000004,
                                   'Pop0/5/RS/v:average_minimum': -76.534184444444435,
                                   'Pop0/5/RS/v:first_spike_time': 341.25,
                                   'Pop0/5/RS/v:interspike_time_covar': 0.097882324784579589,
                                   'Pop0/5/RS/v:max_interspike_time': 109.29999999999995,
                                   'Pop0/5/RS/v:max_peak_no': 10,
                                   'Pop0/5/RS/v:maximum': 59.59367,
                                   'Pop0/5/RS/v:mean_spike_frequency': 10.116906474820144,
                                   'Pop0/5/RS/v:min_interspike_time': 79.25,
                                   'Pop0/5/RS/v:min_peak_no': 9,
                                   'Pop0/5/RS/v:minimum': -81.40911000000001,
                                   'Pop0/5/RS/v:peak_decay_exponent': 0.00096609466310233749,
                                   'Pop0/5/RS/v:peak_linear_gradient': 0.00013312732908670724,
                                   'Pop0/5/RS/v:spike_broadening': 1.0037564164640631,
                                   'Pop0/5/RS/v:spike_frequency_adaptation': -0.017840647747922857,
                                   'Pop0/5/RS/v:spike_width_adaptation': -0.0098094111243575994,
                                   'Pop0/5/RS/v:trough_decay_exponent': -0.013188467951385547,
                                   'Pop0/5/RS/v:trough_phase_adaptation': -0.013867903470868082,
                                   'Pop0/6/RS/v:average_last_1percent': -81.40885523333331,
                                   'Pop0/6/RS/v:average_maximum': 59.530295111111123,
                                   'Pop0/6/RS/v:average_minimum': -75.108279090909093,
                                   'Pop0/6/RS/v:first_spike_time': 284.4,
                                   'Pop0/6/RS/v:interspike_time_covar': 0.078568076692504096,
                                   'Pop0/6/RS/v:max_interspike_time': 23.499999999999773,
                                   'Pop0/6/RS/v:max_peak_no': 45,
                                   'Pop0/6/RS/v:maximum': 59.61398,
                                   'Pop0/6/RS/v:mean_spike_frequency': 44.840764331210195,
                                   'Pop0/6/RS/v:min_interspike_time': 16.800000000000068,
                                   'Pop0/6/RS/v:min_peak_no': 44,
                                   'Pop0/6/RS/v:minimum': -82.13357,
                                   'Pop0/6/RS/v:peak_decay_exponent': -0.0030507912934249308,
                                   'Pop0/6/RS/v:peak_linear_gradient': 2.9097003545416991e-05,
                                   'Pop0/6/RS/v:spike_broadening': 1.0095444459573726,
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</notes>
        <morphology id="morphology">
            <segment id="0" name="Seg0_soma">
                <proximal x="0.000000e+00" y="0.000000e+00" z="0.000000e+00" diameter="29.7838"/>
                <distal x="0.000000e+00" y="0.000000e+00" z="9.266040e+00" diameter="29.7838"/>
            </segment>
            <segment id="2946" name="Seg0_axon">
                <parent segment="0"/>
                <proximal x="0.000000e+00" y="0.000000e+00" z="9.266040e+00" diameter="1.0"/>
                <distal x="1.381590e+01" y="-5.841280e+00" z="9.266040e+00" diameter="1.0"/>
            </segment>
            <segment id="2947" name="Seg1_axon">
                <parent segment="2946"/>
                <distal x="4.144770e+01" y="-1.752380e+01" z="9.266040e+00" diameter="1.0"/>
            </segment>
            <segment id="2948" name="Seg2_axon">
                <parent segment="2947"/>
                <distal x="6.907960e+01" y="-2.920640e+01" z="9.266040e+00" diameter="1.0"/>
            </segment>
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            <segmentGroup neuroLexId="sao864921383" id="soma">
                <notes>This group contains an unbranched set of segments, and all of the segmentGroups marked with
             neuroLexId = sao864921383 form a non-overlapping set of all of the segments.
             These segmentGroups correspond to the 'cables' of NeuroML v1.8.1, and map to/from NEURON sections.</notes>
                <property tag="numberInternalDivisions" value="7"/>
                <member segment="0"/>
            </segmentGroup>
            <segmentGroup neuroLexId="sao864921383" id="axon">
                <notes>This group contains an unbranched set of segments, and all of the segmentGroups marked with
             neuroLexId = sao864921383 form a non-overlapping set of all of the segments.
             These segmentGroups correspond to the 'cables' of NeuroML v1.8.1, and map to/from NEURON sections.</notes>
                <property tag="numberInternalDivisions" value="7"/>
                <member segment="2946"/>
                <member segment="2947"/>
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            </segmentGroup>
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            <segmentGroup id="dendrite_group">
                <include segmentGroup="dend4_1"/>
                <include segmentGroup="dend3_1"/>
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            </segmentGroup>
            <segmentGroup id="soma_group">
                <include segmentGroup="soma"/>
            </segmentGroup>
            <segmentGroup id="axon_group">
                <include segmentGroup="axon"/>
            </segmentGroup>
        </morphology>
        <biophysicalProperties id="biophys">
            <membraneProperties>
                <channelDensity id="pas_all" ionChannel="pas" condDensity="5e-05 S_per_cm2" erev="-81.2979789995 mV" ion="non_specific"/>
                <channelDensity id="kca_dends" ionChannel="kca" condDensity="3.0e-4 S_per_cm2" erev="-90 mV" segmentGroup="dendrite_group" ion="k"/>
                <channelDensity id="kca_soma" ionChannel="kca" condDensity="3.0e-4 S_per_cm2" erev="-90 mV" segmentGroup="soma_group" ion="k"/>
                <channelDensity id="km_dends" ionChannel="km" condDensity="1e-4 S_per_cm2" erev="-90 mV" segmentGroup="dendrite_group" ion="k"/>
                <channelDensity id="km_soma" ionChannel="km" condDensity="2.2e-4 S_per_cm2" erev="-90 mV" segmentGroup="soma_group" ion="k"/>
                <channelDensity id="kv_dends" ionChannel="kv" condDensity="0.0003 S_per_cm2" erev="-90 mV" segmentGroup="dendrite_group" ion="k"/>
                <channelDensity id="kv_soma" ionChannel="kv" condDensity="0.005 S_per_cm2" erev="-90 mV" segmentGroup="soma_group" ion="k"/>
                <channelDensity id="kv_axon" ionChannel="kv" condDensity="0.005 S_per_cm2" erev="-90 mV" segmentGroup="axon_group" ion="k"/>
                <channelDensity id="na_dends" ionChannel="na" condDensity="0.008 S_per_cm2" erev="60 mV" segmentGroup="dendrite_group" ion="na"/>
                <channelDensity id="na_soma" ionChannel="na" condDensity="1.61782979363 S_per_cm2" erev="60 mV" segmentGroup="soma_group" ion="na"/>
                <channelDensity id="na_axon" ionChannel="na" condDensity="1.61782979363 S_per_cm2" erev="60 mV" segmentGroup="axon_group" ion="na"/>
                <channelDensity id="it_dends" ionChannel="it" condDensity="0.00015 S_per_cm2" erev="140.67523 mV" segmentGroup="dendrite_group" ion="ca"/>
                <channelDensity id="it_soma" ionChannel="it" condDensity="0.0003 S_per_cm2" erev="140.67523 mV" segmentGroup="soma_group" ion="ca"/>
                <channelDensity id="ca_dends" ionChannel="ca" condDensity="5e-5 S_per_cm2" erev="140.67523 mV" segmentGroup="dendrite_group" ion="ca"/>
                <channelDensity id="ca_soma" ionChannel="ca" condDensity="5e-5 S_per_cm2" erev="140.67523 mV" segmentGroup="soma_group" ion="ca"/>
                <spikeThresh value="10mV"/>
                <specificCapacitance value="0.897586517256 uF_per_cm2"/>
                <initMembPotential value="-75.0 mV"/>
            </membraneProperties>
            <intracellularProperties>
                <resistivity value="0.1 kohm_cm"/>
            </intracellularProperties>
        </biophysicalProperties>
    </cell>
</neuroml>
